# [component: outputs X]
ORIGIN := 1
x := sort(X)
# Imties charakteristikos:
# Pradiniai
# duomenys
# Variacinė
# eilutė
X = [
    6.37; 17.28; 14.91; 7.99; 1.69; 10.19; 27.19; 14.3; 4.23; 10.55
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]
x = [
    0.06; 0.12; 0.23; 0.35; 0.43; 0.5; 0.56; 0.61; 0.7; 1.34
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]
n := length(X)
dazniu_skirstinys(imtis) :=
    u ← sort(imtis)
    i ← 1
    y[i] ← u[i]
    v[i] ← 0
    for elem ∈ u
        v[i] ← v[i] + 1 if y[i] == elem
        otherwise
            i ← i + 1
            y[i] ← elem
            v[i] ← 1
    augment(y, v)
y := dazniu_skirstinys(X)
# Imties dažnių eilutė
transpose(y) = [
    0.06, 0.12, 0.23, 0.35, 0.43, 0.5, 0.56, 0.61, 0.7, 1.34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;
    1, 1, 1, 1, 1, 1, 1, 1, 1, 1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]
v := dazniu_skirstinys(X)[:, 2]
w := v/n
# Imties santykinių dažnių eilutė
transpose(w) = [
    0.01, 0.01, 0.01, 0.01, 0.01, 0.01, 0.01, 0.01, 0.01, 0.01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]
kvantilis(q, imtis) :=
    u ← sort(imtis)
    n ← length(u)
    i ← floor(n*q)
    if floor(n*q) == ceil(n*q)
        u_q ← 0 if i == 0
        u_q ← u[i] if i == n
        u_q ← (u[i] + u[i + 1])/2 otherwise
    u_q ← u[i + 1] otherwise
    u_q
# Imties charakteristikos
# Imties dydis
n := rows(X) = 100
# Imties vidurkis
x_vid := 1/n*sum(x[i], i = 1 .. n) = 10.7541
v_vid := mean(x) = 10.7541
# Didziausia ir maziausa imties reiksmes
x_min := min(X) = 0.06
x_max := max(X) = 37.26
# Imties plotis
IP := x_max - x_min = 37.2
# Imties dispersija
s2 := 1/n*sum((x[i] - x_vid)^2, i = 1 .. n) = 69.0675
var(x) = 69.0675
# imties standartinis nuokrypis
s := sqrt(1/(n - 1)*sum((x[i] - x_vid)^2, i = 1 .. n)) = 8.35256
s := Stdev(x) = 8.35256
# Imties vidurkio standartine paklaida
s_vid := s/sqrt(n) = 0.835256
# Imties kitimo (variacijos) koeficientas
v := s/x_vid = 0.776686
# Imties kvantiliai:
X_0.75 := kvantilis(0.75, X) = 15.855
X_0.25 := kvantilis(0.25, X) = 4.155
X_0.5 := kvantilis(0.5, X) = 9.395
# Imties mediana
X_me := median(X) = 9.395
# Imties standartinis nuokrypis
S := stdev(X) = 8.31069
N := 1 + 3.322*log(n) = 7.644
# Parenkame intervalų skaičių  k=8
x_min = 0.06
x_max = 37.26
IP = 37.2
N := floor(N) = 7
k := 1 .. N
a[1] := floor(x[1]/10)*10 = 0
a[N + 1] := ceil(x[n]/10)*10
a[N + 1] = 40
h := (a[N + 1] - a[1])/N = 5.71429
a[k] := a[1] + (k - 1)*h
v := hist(a, x)
v = [36; 27; 14; 13; 7; 2; 1]
sum(v) = 100
a = [0; 5.71429; 11.4286; 17.1429; 22.8571; 28.5714; 34.2857; 40]
b[k] := a[k] + h/2
x_vid = 10.7541
1/n*sum(b[i]*v[i], i = 1 .. N) = 10.7429
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Δ := 1/(n*h)*v
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w := v/n
Σw[k] := sum(w[i], i = 1 .. k)
# Santykiniai dažniai:
transpose(w) = [0.36, 0.27, 0.14, 0.13, 0.07, 0.02, 0.01]
# Sukauptieji santykiniai dažniai:
transpose(Σw) = [0.36, 0.63, 0.77, 0.9, 0.97, 0.99, 1]
# Grupuotų duoemenų vidurkis:
x_gvid := 1/n*sum((a[i] + a[i + 1])/2*v[i], i = 1 .. N) = 10.7429
# Grupuotų duomenų dispersija:
chem(s^2) := 1/(n - 1)*sum(((a[i] + a[i + 1])/2 - x_vid)^2*v[i], i = 1 .. N) = 68.4594
# Standartinis nuokrypis:
s := sqrt(s^2) = 8.35256
# Pasiskirstymo f-ija:
F_n(x) :=
    0 if x ≤ a[1]
    Σw[1] if a[1] < x ≤ a[2]
    Σw[2] if a[2] < x ≤ a[3]
    Σw[3] if a[3] < x ≤ a[4]
    Σw[4] if a[4] < x ≤ a[5]
    Σw[5] if a[5] < x ≤ a[6]
    Σw[6] if a[6] < x ≤ a[7]
    Σw[7] if x > a[7]
a = [0; 5.71429; 11.4286; 17.1429; 22.8571; 28.5714; 34.2857; 40]
m := -3, -2.5 .. 50
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histograma(a, imtis) :=
    ν ← hist(a, imtis)
    for i ∈ 1 .. last(a)
        b[2*i - 1] ← a[i]
        b[2*i] ← a[i]
        v[2*i - 1] ← 0
        v[2*i] ← ν[i] if i ≠ last(a)
        v[2*i] ← 0 otherwise
    augment(b, v)
xp := histograma(a, X)[:, 1]
vd := histograma(a, X)[:, 2]
transpose(histograma(a, X)) = [
    0, 0, 5.71429, 5.71429, 11.4286, 11.4286, 17.1429, 17.1429, 22.8571, 22.8571, 28.5714, 28.5714, 34.2857, 34.2857, 40, 40;
    0, 36, 0, 27, 0, 14, 0, 13, 0, 7, 0, 2, 0, 1, 0, 0
]
v := vd/(n*h)
transpose(v) = [0, 0.063, 0, 0.04725, 0, 0.0245, 0, 0.02275, 0, 0.01225, 0, 0.0035, 0, 0.00175, 0, 0]
xi := 0.1, 0.2 .. 40
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# Darome prielaida, kad duomenys yra pasiskirstę pagal normalųjį desnį
# Keliama hipoteze
# H_0: X ~N(μ,σ^2)
# H_a: X <> N(μ,σ^2)
# Randamas eksponentinio pasiskirstymo parametrinis įvertis
L(χ, π) == 1/(σ*sqrt(2*π))*e^(-1/(2*σ^2)*sum((x[i] - m)^2, i = 1 .. n))
r := 2
# todėl, kad yra nežinomi 2 parametrai
α := 0.1
# reikšmingumo lygmuo
# Hipotezės tikrinimui parenkame statistiką, kuri turi skirstinį χ^2 su parametru ν= k-r-1,
# čia r=1 - nežinomų parametrų skaičius, k=7 - intervalų skaičius.
χ^2 == sum((o_j - e_j)^2/e_j, j = 1 .. k)
# o_j - intervaliniai daþniai | e_j - teoriniai daþniai
# Normalusis atsitiktinis dydis įgyja reikšmes nuo -∞ iki +∞, todėl formaliai turime
# pakeisti pirmojo ir paskutiniojo intervalų kraštinius taškus.
b := a
b[1] := -∞
b[N + 1] := ∞
o := hist(b, X)
j := 1 .. N
# Apskaičiuojame imties vidurkį ir dipersiją grupuotiems duomenims
x_vid := 1/n*sum(((a[i] + a[i + 1])/2)*o[i], i = 1 .. N)
s := sqrt(1/(n - 1)*sum(((a[i] + a[i + 1])/2 - x_vid)^2*o[i], i = 1 .. N))
e[j] := (pnorm(b[j + 1], x_vid, s) - pnorm(b[j], x_vid, s))*n
pašalinti(V, c) :=
    i ← 1
    for j ∈ 1 .. rows(V)
        if (j ≠ c)
            U[i] ← V[j]
            i ← i + 1
    U
b = [-1e307; 0; 0; 0; 0; 0; 0; 1e307]
o = [36; 27; 14; 13; 7; 2; 1]
# Reikia sujungti du paskutinius e narius, nes paskutinis mažesnis už 5.
b := pašalinti(b, 7)
a := pašalinti(a, 7)
# Naujai sudarytiems intervalams apskaičiuosime tikėtinus dažnius ir stebėta kriterijaus statistikos reikšmę.
o := hist(b, X)
k := rows(o)
j := 1 .. k
e := 0
k = 6
x_vid := 1/n*sum(((a[i] + a[i + 1])/2)*o[i], i = 1 .. k)
s := sqrt(1/(n - 1)*sum(((a[i] + a[i + 1])/2 - x_vid)^2*o[i], i = 1 .. k))
e[j] := (pnorm(b[j + 1], x_vid, s) - pnorm(b[j], x_vid, s))*n
b = [-1e307; 0; 0; 0; 0; 0; 1e307]
o = [36; 27; 14; 13; 7; 3]
e = [27.2155; 25.9244; 24.6132; 14.8797; 5.72536; 1.64184]
o - e = [8.78453; 1.07561; -10.6132; -1.87969; 1.27464; 1.35816]
(o - e)^2 = [77.168; 1.15694; 112.641; 3.53325; 1.6247; 1.84459]
chem((χ^2)*imt) := sum((o[j] - e[j])^2/e[j], j)
# Randame hipotezės H_0 kritinę sritį W_k ir neatmetimo sriti W_0
chem((χ^2)*.1 - α;3) := qchisq(1 - α, k - r - 1)
chem((χ^2)*.1 - α;3) = 6.25139
W_k == (6.251, ∞)
W_0 == (0, 6.251)
chem(χ^2) := 0, 0.01 .. 20
O := 0.1
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# Išvada: Hipotezė H_0 neatmetama, nes (χ^2)*imt priklauso W_0. Patikrinome empirines
# pasiskirstymo funkcijos suderinamumą su teorine hipoteze.
# Generalines aibes tankio ir pasiskirstymo funkcijos
p(x) :=
    0.2*e^(-(x - 9.265)^2/9) if 0 ≤ x
    0 otherwise
F(x) :=
    0.2*integral(e^(-(y - 9.265)^2/9), y = -∞ .. x) if 0 ≤ x
    0 otherwise
