ORIGIN := 1
dažnių_skirstinys(imtis) :=
    u ← sort(imtis)
    i ← 1
    y[i] ← u[i]
    ν[i] ← 0
    for elem ∈ u
        ν[i] ← ν[i] + 1 if y[i] == elem
        otherwise
            i ← i + 1
            y[i] ← elem
            ν[i] ← 1
    augment(y, ν)
X := READPRN("D:\Desktop\Sandros matematika\duomenys.txt")
n := length(X)
n = 100
x := dažnių_skirstinys(X)[:, 1]  # įgyjamos reikšmes
ν := dažnių_skirstinys(X)[:, 2]  # imties dažnių eilutė
z := dažnių_skirstinys(X)  # imties santykinių dažnių eilutė
ω := ν/n
# Variacinė eilutė | Imties dažnių eilutė | Imties santykinių dažnių eilutė
kvantilis(q, imtis) :=
    u ← sort(imtis)
    n ← length(imtis)
    i ← floor(q*n)
    if floor(q*n) == ceil(q*n)
        u_q ← 0 if i == 0
        u_q ← u[i] if i == n
        u_q ← (u[i] + u[i + 1])/2 otherwise
    u_q ← u[i + 1] otherwise
    u_q
sort(X) = [
    0.28; 0.38; 0.47; 0.51; 0.61; 0.68; 0.93; 1.54; 1.88; 1.98
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]
z = [
    0.28, 1;
    0.38, 1;
    0.47, 1;
    0.51, 1;
    0.61, 1;
    0.68, 1;
    0.93, 1;
    1.54, 1;
    1.88, 1;
    1.98, 1
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]
ω = [
    0.01; 0.01; 0.01; 0.01; 0.01; 0.01; 0.01; 0.01; 0.01; 0.01
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]
# Imties harakteristikos
# Imties dydis
n = 100
# Imties vidurkis
X_vid := mean(X)
X_vid = 27.1219
# Imties apatinis kvartilis
X_0.75 := kvantilis(0.75, X)
X_0.75 = 36.635
# Imties viršutinis kvartilis
X_0.25 := kvantilis(0.25, X)
X_0.25 = 5.93
# Imties mediana
X_me := median(X)
X_me = 21.675
# Mažiausia imties reikšmė
X_min := min(X)
X_min = 0.28
# Didžiausia imties reikšmė
X_max := max(X)
X_max = 139.42
# Imties dispersija
D := var(X)
D = 667.237
# Imties moda:
X_mo := 14.55
# Imties standartinis nuokrypis
S := stdev(X)
S = 25.8309
# Duomenu grupavimas
k := 1 + 3.322*log(n)
k = 7.644
# Parenkame intervalų skaičių  k=8
x_min := min(X)
x_max := max(X)
x_min = 0.28
x_max = 139.42
# Imties plotis
IP := x_max - x_min
IP = 139.14
# Parenkame intervalą, kuris padengtų visas imties reikšmes
k := 8
a_0 := 0
a_k := 140
a_k - a_0 = 140
# Šį intervalą daliname į 7 intervalus, su pločiu
h := (a_k - a_0)/k
h = 17.5
i := 1 .. k + 1
a[i] := a_0 + (i - 1)*h
# Dabar jau galima rasti intervalinių dažnių skirsti
ν := hist(a, X)
a = [0; 17.5; 35; 52.5; 70; 87.5; 105; 122.5; 140]
ν = [44; 29; 13; 7; 4; 1; 1; 1]
# dažnis
n = 100
sum(ν) = 100
ω := ν/n
i := 1 .. k
Σω[i] := sum(ω[s], s = 1 .. i)
# Santikiniai dažniai
transpose(ω) = [0.44, 0.29, 0.13, 0.07, 0.04, 0.01, 0.01, 0.01]
# Sukauptieji santikiniai dažniai
transpose(Σω) = [0.44, 0.73, 0.86, 0.93, 0.97, 0.98, 0.99, 1]
# Grupuotų duomenų vidurkis
x_vid := 1/n*sum((a[i] + a[i + 1])/2*ν[i], i = 1 .. k)
x_vid = 28
# Grupuotu duomenu dispersija
chem(s^2) := 1/(n - 1)*sum(((a[i] + a[i + 1])/2 - x_vid)^2*ν[i], i = 1 .. k)
chem(s^2) = 609.407
# Grupuotų duomenų standartinis nuokrypis
s := sqrt(chem(s^2))
s = 24.6862
transpose(a) = [0, 17.5, 35, 52.5, 70, 87.5, 105, 122.5, 140]
# Sukauptieji santikiniai dažniai
transpose(Σω) = [0.44, 0.73, 0.86, 0.93, 0.97, 0.98, 0.99, 1]
# Pasiskirstymo funkcija
F_n(x) :=
    0 if x < 0
    0.44 if 0 < x ≤ 17.5
    0.73 if 17.5 < x ≤ 35
    0.86 if 35 < x ≤ 52.5
    0.93 if 52.5 < x ≤ 70
    0.97 if 70 < x ≤ 87.5
    0.98 if 87.5 < x ≤ 105
    0.99 if 105 < x ≤ 122.5
    1 if x ≥ 122.5
x := -3, -2.9 .. 140
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histograma(a, imtis) :=
    ν ← hist(a, imtis)
    for i ∈ 1 .. last(a)
        b[2*i - 1] ← a[i]
        b[2*i] ← a[i]
        v[2*i - 1] ← 0
        v[2*i] ← ν[i] if i ≠ last(a)
        v[2*i] ← 0 otherwise
    augment(b, v)
x := histograma(a, X)[:, 1]
ν1 := histograma(a, X)[:, 2]
ν := ν1/(n*h)
xx := 0.1, 0.2 .. 140
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histograma(a, X) = [
    0, 0;
    0, 44;
    17.5, 0;
    17.5, 29;
    35, 0;
    35, 13;
    52.5, 0;
    52.5, 7;
    70, 0;
    70, 4;
    87.5, 0;
    87.5, 1;
    105, 0;
    105, 1;
    122.5, 0;
    122.5, 1;
    140, 0;
    140, 0
]
# Darome prielaida, kad duomenys yra pasiskirstę pagal normalųjį desnį
# Keliama hipoteze | H_0: X ~N(μ,σ^2) | H_a: X <> N(μ,σ^2)
# , | Randamas eksponentinio pasiskirstymo parametrinis įvertis
L(χ, π) == 1/(σ*sqrt(2*π))*e^(-1/(2*σ^2)*sum((x[i] - m)^2, i = 1 .. n))
r := 2  # todėl, kad yra nežinomi 2 parametrai
α := 0.1  # reikšmingumo lygmuo
# Hipotezės tikrinimui parenkame statistiką, kuri turi skirstinį χ^2 su parametru ν= k-r-1,
# čia r=1 - nežinomų parametrų skaičius, k=7 - intervalų skaičius.
# o[j] | intervaliniai dažniai
χ^2 == sum((o_j - e_j)^2/e_j, j = 1 .. k)  # e[j]  # teoriniai dažniai
# Normalusis atsitiktinis dydis įgyja reikšmes nuo -∞ iki +∞, todėl formaliai turime
# pakeisti pirmojo ir paskutiniojo intervalų kraštinius taškus.
b := a
b[1] := 0
b[k + 1] := ∞
o := hist(b, X)
j := 1 .. k
# Apskaičiuojame imties vidurkį ir dipersiją grupuotiems duomenims
x_vid := 1/n*sum(((a[i] + a[i + 1])/2)*o[i], i = 1 .. k)
s := sqrt(1/(n - 1)*sum(((a[i] + a[i + 1])/2 - x_vid)^2*o[i], i = 1 .. k))
L := 1/x_vid
L = 0.0357143
e[j] := (pexp(b[j + 1], L) - pexp(b[j], L))*n
pašalinti(V, c) :=
    i ← 1
    for j ∈ 1 .. rows(V)
        if (j ≠ c)
            U[i] ← V[j]
            i ← i + 1
    U
b = [0; 17.5; 35; 52.5; 70; 87.5; 105; 122.5; 1e307]
o = [44; 29; 13; 7; 4; 1; 1; 1]
# Reikia sujungti du paskutinius e narius, nes paskutinis mažesnis už 5.
b := pašalinti(b, 7)
a := pašalinti(a, 7)
# Naujai sudarytiems intervalams apskaičiuosime tikėtinus dažnius ir stebėta kriterijaus statistikos reikšmę.
o := hist(b, X)
e := 0
k := rows(o)
k = 7
j := 1 .. k
x_vid := 1/n*sum(((a[i] + a[i + 1])/2)*o[i], i = 1 .. k)
s := sqrt(1/(n - 1)*sum(((a[i] + a[i + 1])/2 - x_vid)^2*o[i], i = 1 .. k))
L = 0.0357143
L := 1/x_vid
e[j] := (pexp(b[j + 1], L) - pexp(b[j], L))*n
b = [0; 17.5; 35; 52.5; 70; 87.5; 122.5; 1e307]
o = [44; 29; 13; 7; 4; 2; 1]
e = [46.4739; 24.8757; 13.315; 7.127; 3.81481; 3.13488; 1.25881]
o - e = [-2.47386; 4.12434; -0.314983; -0.126997; 0.185193; -1.13488; -0.258814]
(o - e)^2 = [6.11997; 17.0102; 0.0992143; 0.0161282; 0.0342966; 1.28795; 0.0669848]
chem((χ^2)*imt) := sum((o[j] - e[j])^2/e[j], j)
# Randame hipotezės H_0 kritinę sritį W_k ir neatmetimo sriti W_0
chem((χ^2)*.1 - α;3) := qchisq(1 - α, k - r - 1)
chem((χ^2)*.1 - α;3) = 7.77944
W_k == (6.251, ∞)
W_0 == (0, 6.251)
chem(χ^2) := 0, 0.01 .. 20
O := 0.1
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# Išvada: Hipotezė H_0 neatmetama, nes (χ^2)*imt priklauso W_0. Patikrinome empirines
# pasiskirstymo funkcijos suderinamumą su teorine hipoteze.
# Generalines aibes tankio ir pasiskirstymo funkcijos
p(x) :=
    0.2*e^(-(x - 9.265)^2/9) if 0 ≤ x
    0 otherwise
F(x) :=
    0.2*integral(e^(-(y - 9.265)^2/9), y = -∞ .. x) if 0 ≤ x
    0 otherwise
