ORIGIN := 1
dažnių_skirstinys(imtis) :=
    u ← sort(imtis)
    i ← 1
    y[i] ← u[i]
    ν[i] ← 0
    for elem ∈ u
        ν[i] ← ν[i] + 1 if y[i] == elem
        otherwise
            i ← i + 1
            y[i] ← elem
            ν[i] ← 1
    augment(y, ν)
X := READPRN("C:\Users\balfr\Desktop\laboras tikimybiu\duomenys.txt")  # error: Can't open the data file.
n := length(X)
n =  # error: This variable is undefined.
x := dažnių_skirstinys(X)[:, 1]  # įgyjamos reikšmes
ν := dažnių_skirstinys(X)[:, 2]  # imties dažnių eilutė
z := dažnių_skirstinys(X)  # imties santykinių dažnių eilutė
ω := ν/n
# Variacinė eilutė | Imties dažnių eilutė | Imties santykinių dažnių eilutė
kvantilis(q, imtis) :=
    u ← sort(imtis)
    n ← length(imtis)
    i ← floor(q*n)
    if floor(q*n) == ceil(q*n)
        u_q ← 0 if i == 0
        u_q ← u[i] if i == n
        u_q ← (u[i] + u[i + 1])/2 otherwise
    u_q ← u[i + 1] otherwise
    u_q
sort(X) =  # error
z =  # error
ω =  # error
# Imties harakteristikos
# Imties dydis
n =  # error
# Imties vidurkis
X_vid := mean(X)
X_vid =  # error
# Imties apatinis kvartilis
X_0.75 := kvantilis(0.75, X)
X_0.75 =  # error
# Imties viršutinis kvartilis
X_0.25 := kvantilis(0.25, X)
X_0.25 =  # error
# Imties mediana
X_me := median(X)
X_me =  # error
# Mažiausia imties reikšmė
X_min := min(X)
X_min =  # error
# Didžiausia imties reikšmė
X_max := max(X)
X_max =  # error
# Imties dispersija
D := var(X)
D =  # error
# Imties moda:
X_mo := 14.55
# Imties standartinis nuokrypis
S := stdev(X)
S =  # error
# Duomenu grupavimas
k := 1 + 3.322*log(n)
k =  # error
# Parenkame intervalų skaičių  k=8
x_min := min(X)
x_max := max(X)
x_min =  # error
x_max =  # error
# Imties plotis
IP := x_max - x_min
IP =  # error
# Parenkame intervalą, kuris padengtų visas imties reikšmes
k := 7
a_0 := 5.3
a_k := 14.4
a_k - a_0 = 9.1
# Šį intervalą daliname į 7 intervalus, su pločiu
h := (a_k - a_0)/k
h = 1.3
i := 1 .. k + 1
a[i] := a_0 + (i - 1)*h
# Dabar jau galima rasti intervalinių dažnių skirsti
ν := hist(a, X)
a = [5.3; 6.6; 7.9; 9.2; 10.5; 11.8; 13.1; 14.4]
ν =  # error
# dažnis
n =  # error
sum(ν) =  # error
ω := ν/n
i := 1 .. k
Σω[i] := sum(ω[s], s = 1 .. i)
# Santikiniai dažniai
transpose(ω) =  # error
# Sukauptieji santikiniai dažniai
transpose(Σω) =  # error
# Grupuotų duomenų vidurkis
x_vid := 1/n*sum((a[i] + a[i + 1])/2*ν[i], i = 1 .. k)
x_vid =  # error
# Grupuotu duomenu dispersija
chem(s^2) := 1/(n - 1)*sum(((a[i] + a[i + 1])/2 - x_vid)^2*ν[i], i = 1 .. k)
chem(s^2) =  # error
# Grupuotų duomenų standartinis nuokrypis
s := sqrt(chem(s^2))
s =  # error
transpose(a) = [5.3, 6.6, 7.9, 9.2, 10.5, 11.8, 13.1, 14.4]
# Sukauptieji santikiniai dažniai
transpose(Σω) =  # error
# Pasiskirstymo funkcija
F_n(x) :=
    0 if 5.3 ≥ x
    0.15 if 5.3 < x ≤ 6.6
    0.25 if 6.6 < x ≤ 7.9
    0.5 if 7.9 < x ≤ 9.2
    0.7 if 9.2 < x ≤ 10.5
    0.9 if 10.5 < x ≤ 11.8
    0.96 if 11.8 < x ≤ 13.1
    1 if 13.1 < x
x := -3, -2.9 .. 20
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histograma(a, imtis) :=
    ν ← hist(a, imtis)
    for i ∈ 1 .. last(a)
        b[2*i - 1] ← a[i]
        b[2*i] ← a[i]
        v[2*i - 1] ← 0
        v[2*i] ← ν[i] if i ≠ last(a)
        v[2*i] ← 0 otherwise
    augment(b, v)
x := histograma(a, X)[:, 1]
ν1 := histograma(a, X)[:, 2]
ν := ν1/(n*h)
xx := 0.1, 0.2 .. 140
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histograma(a, X) =  # error
# Darome prielaida, kad duomenys yra pasiskirstę pagal normalųjį desnį
# Keliama hipoteze | H_0: X ~N(μ,σ^2) | H_a: X <> N(μ,σ^2)
# , | Randamas eksponentinio pasiskirstymo parametrinis įvertis
L(χ, π) == 1/(σ*sqrt(2*π))*e^(-1/(2*σ^2)*sum((x[i] - m)^2, i = 1 .. n))
r := 2  # todėl, kad yra nežinomi 2 parametrai
α := 0.1  # reikšmingumo lygmuo
# Hipotezės tikrinimui parenkame statistiką, kuri turi skirstinį χ^2 su parametru ν= k-r-1,
# čia r=1 - nežinomų parametrų skaičius, k=7 - intervalų skaičius.
# o[j] | intervaliniai dažniai
χ^2 == sum((o_j - e_j)^2/e_j, j = 1 .. k)  # e[j]  # teoriniai dažniai
# Normalusis atsitiktinis dydis įgyja reikšmes nuo -∞ iki +∞, todėl formaliai turime
# pakeisti pirmojo ir paskutiniojo intervalų kraštinius taškus.
b := a
b[1] := -∞
b[k + 1] := ∞
o := hist(b, X)
j := 1 .. k
# Apskaičiuojame imties vidurkį ir dipersiją grupuotiems duomenims
x_vid := 1/n*sum(((a[i] + a[i + 1])/2)*o[i], i = 1 .. k)
s := sqrt(1/(n - 1)*sum(((a[i] + a[i + 1])/2 - x_vid)^2*o[i], i = 1 .. k))
e[j] := (pnorm(b[j + 1], x_vid, s) - pnorm(b[j], x_vid, s))*n
pašalinti(V, c) :=
    i ← 1
    for j ∈ 1 .. rows(V)
        if (j ≠ c)
            U[i] ← V[j]
            i ← i + 1
    U
b = [-1e307; 6.6; 7.9; 9.2; 10.5; 11.8; 13.1; 1e307]
o =  # error
# Reikia sujungti du paskutinius e narius, nes paskutinis mažesnis už 5.
b := pašalinti(b, 7)
a := pašalinti(a, 7)
# Naujai sudarytiems intervalams apskaičiuosime tikėtinus dažnius ir stebėta kriterijaus statistikos reikšmę.
o := hist(b, X)
e := 0
k := rows(o)
k =  # error
j := 1 .. k
x_vid := 1/n*sum(((a[i] + a[i + 1])/2)*o[i], i = 1 .. k)
s := sqrt(1/(n - 1)*sum(((a[i] + a[i + 1])/2 - x_vid)^2*o[i], i = 1 .. k))
e[j] := (pnorm(b[j + 1], x_vid, s) - pnorm(b[j], x_vid, s))*n
b = [-1e307; 6.6; 7.9; 9.2; 10.5; 11.8; 1e307]
o =  # error
e =  # error
o - e =  # error
(o - e)^2 =  # error
chem((χ^2)*imt) := sum((o[j] - e[j])^2/e[j], j)
# Randame hipotezės H_0 kritinę sritį W_k ir neatmetimo sriti W_0
chem((χ^2)*.1 - α;3) := qchisq(1 - α, k - r - 1)
chem((χ^2)*.1 - α;3) =  # error
W_k == (6.251, ∞)
W_0 == (0, 6.251)
chem(χ^2) := 0, 0.01 .. 20
O := 0.1
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# Išvada: Hipotezė H_0 neatmetama, nes (χ^2)*imt priklauso W_0. Patikrinome empirines
# pasiskirstymo funkcijos suderinamumą su teorine hipoteze.
# Generalines aibes tankio ir pasiskirstymo funkcijos
p(x) :=
    0.2*e^(-(x - 9.265)^2/9) if 0 ≤ x
    0 otherwise
F(x) :=
    0.2*integral(e^(-(y - 9.265)^2/9), y = -∞ .. x) if 0 ≤ x
    0 otherwise
