ORIGIN := 1
dažnių_skirstinys(imtis) :=
    u ← sort(imtis)
    i ← 1
    y[i] ← u[i]
    ν[i] ← 0
    for elem ∈ u
        ν[i] ← ν[i] + 1 if y[i] == elem
        otherwise
            i ← i + 1
            y[i] ← elem
            ν[i] ← 1
    augment(y, ν)
X := READPRN("duomenys.txt")
n := length(X)
n = 100
x := dažnių_skirstinys(X)[:, 1]  # įgyjamos reikšmes
ν := dažnių_skirstinys(X)[:, 2]  # imties dažnių eilutė
z := dažnių_skirstinys(X)  # imties santykinių dažnių eilutė
ω := ν/n
# Variacinė eilutė | Imties dažnių eilutė | Imties santykinių dažnių eilutė
kvantilis(q, imtis) :=
    u ← sort(imtis)
    n ← length(imtis)
    i ← floor(q*n)
    if floor(q*n) == ceil(q*n)
        u_q ← 0 if i == 0
        u_q ← u[i] if i == n
        u_q ← (u[i] + u[i + 1])/2 otherwise
    u_q ← u[i + 1] otherwise
    u_q
sort(X) = [
    1.01; 1.01; 1.01; 1.01; 1.03; 1.04; 1.05; 1.07; 1.1; 1.13
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]
z = [
    1.01, 4;
    1.03, 1;
    1.04, 1;
    1.05, 1;
    1.07, 1;
    1.1, 1;
    1.13, 1;
    1.14, 1;
    1.16, 1;
    1.21, 1
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]
ω = [
    0.04; 0.01; 0.01; 0.01; 0.01; 0.01; 0.01; 0.01; 0.01; 0.01
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]
# Imties harakteristikos
# Imties dydis
n = 100
# Imties vidurkis
X_vid := mean(X)
X_vid = 1.9217
# Imties apatinis kvartilis
X_0.75 := kvantilis(0.75, X)
X_0.75 = 2.3
# Imties viršutinis kvartilis
X_0.25 := kvantilis(0.25, X)
X_0.25 = 1.43
# Imties mediana
X_me := median(X)
X_me = 1.875
# Mažiausia imties reikšmė
X_min := min(X)
X_min = 1.01
# Didžiausia imties reikšmė
X_max := max(X)
X_max = 3
# Imties dispersija
D := var(X)
D = 0.338474
# Imties moda:
X_mo := 14.55
# Imties standartinis nuokrypis
S := stdev(X)
S = 0.581785
# Duomenu grupavimas
k := 1 + 3.322*log(n)
k = 7.644
# Parenkame intervalų skaičių  k=8
x_min := min(X)
x_max := max(X)
x_min = 1.01
x_max = 3
# Imties plotis
IP := x_max - x_min
IP = 1.99
# Parenkame intervalą, kuris padengtų visas imties reikšmes
k := 10
a_0 := 1.01
a_k := 3
a_k - a_0 = 1.99
# Šį intervalą daliname į 7 intervalus, su pločiu
h := (a_k - a_0)/k
h = 0.199
i := 1 .. k + 1
a[i] := a_0 + (i - 1)*h
# Dabar jau galima rasti intervalinių dažnių skirsti
ν := hist(a, X)
a = [1.01; 1.209; 1.408; 1.607; 1.806; 2.005; 2.204; 2.403; 2.602; 2.801; 3]
ν = [12; 13; 9; 14; 6; 10; 13; 6; 10; 7]
# dažnis
n = 100
sum(ν) = 100
ω := ν/n
i := 1 .. k
Σω[i] := sum(ω[s], s = 1 .. i)
# Santykiniai dažniai
transpose(ω) = [0.12, 0.13, 0.09, 0.14, 0.06, 0.1, 0.13, 0.06, 0.1, 0.07]
# Sukauptieji santykiniai dažniai
transpose(Σω) = [0.12, 0.25, 0.34, 0.48, 0.54, 0.64, 0.77, 0.83, 0.93, 1]
# Grupuotų duomenų vidurkis
x_vid := 1/n*sum((a[i] + a[i + 1])/2*ν[i], i = 1 .. k)
x_vid = 1.9254
# Grupuotu duomenų dispersija
chem(s^2) := 1/(n - 1)*sum(((a[i] + a[i + 1])/2 - x_vid)^2*ν[i], i = 1 .. k)
chem(s^2) = 0.323608
# Grupuotų duomenų standartinis nuokrypis
s := sqrt(chem(s^2))
s = 0.568866
transpose(a) = [1.01, 1.209, 1.408, 1.607, 1.806, 2.005, 2.204, 2.403, 2.602, 2.801, 3]
# Sukauptieji santykiniai dažniai
transpose(Σω) = [0.12, 0.25, 0.34, 0.48, 0.54, 0.64, 0.77, 0.83, 0.93, 1]
# Pasiskirstymo funkcija
F_n(x) :=
    0 if 1.01 ≥ x
    0.15 if 1.294 < x ≤ 6.6
    0.25 if 1.579 < x ≤ 7.9
    0.5 if 1.863 < x ≤ 9.2
    0.7 if 2.147 < x ≤ 10.5
    0.9 if 2.431 < x ≤ 11.8
    0.96 if 2.716 < x ≤ 13.1
    1 if 3 < x
x := -3, -2.9 .. 20
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histograma(a, imtis) :=
    ν ← hist(a, imtis)
    for i ∈ 1 .. last(a)
        b[2*i - 1] ← a[i]
        b[2*i] ← a[i]
        v[2*i - 1] ← 0
        v[2*i] ← ν[i] if i ≠ last(a)
        v[2*i] ← 0 otherwise
    augment(b, v)
x := histograma(a, X)[:, 1]
ν1 := histograma(a, X)[:, 2]
ν := ν1/(n*h)
xx := 0.1, 0.2 .. 140
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histograma(a, X) = [
    1.01, 0;
    1.01, 12;
    1.209, 0;
    1.209, 13;
    1.408, 0;
    1.408, 9;
    1.607, 0;
    1.607, 14;
    1.806, 0;
    1.806, 6;
    2.005, 0;
    2.005, 10;
    2.204, 0;
    2.204, 13;
    2.403, 0;
    2.403, 6;
    2.602, 0;
    2.602, 10;
    2.801, 0;
    2.801, 7;
    3, 0;
    3, 0
]
# Darome prielaida, kad duomenys yra pasiskirstę pagal normalųjį desnį
# Keliama hipoteze | H_0: X ~N(μ,σ^2) | H_a: X <> N(μ,σ^2)
# Randamas eksponentinio pasiskirstymo parametrinis įvertis
# ,
L(χ, π) == 1/(σ*sqrt(2*π))*e^(-1/(2*σ^2)*sum((x[i] - m)^2, i = 1 .. n))
r := 2  # todėl, kad yra nežinomi 2 parametrai
α := 0.1  # reikšmingumo lygmuo
# Hipotezės tikrinimui parenkame statistiką, kuri turi skirstinį χ^2 su parametru ν= k-r-1,
# čia r=1 - nežinomų parametrų skaičius, k=7 - intervalų skaičius.
# o[j] | intervaliniai dažniai
χ^2 == sum((o_j - e_j)^2/e_j, j = 1 .. k)
# e[j] | teoriniai dažniai
# Normalusis atsitiktinis dydis įgyja reikšmes nuo -∞ iki +∞, todėl formaliai turime
# pakeisti pirmojo ir paskutiniojo intervalų kraštinius taškus.
b := a
b[1] := -∞
b[k + 1] := ∞
o := hist(b, X)
j := 1 .. k
# Apskaičiuojame imties vidurkį ir dipersiją grupuotiems duomenims
x_vid := 1/n*sum(((a[i] + a[i + 1])/2)*o[i], i = 1 .. k)
s := sqrt(1/(n - 1)*sum(((a[i] + a[i + 1])/2 - x_vid)^2*o[i], i = 1 .. k))
e[j] := (pnorm(b[j + 1], x_vid, s) - pnorm(b[j], x_vid, s))*n
pašalinti(V, c) :=
    i ← 1
    for j ∈ 1 .. rows(V)
        if (j ≠ c)
            U[i] ← V[j]
            i ← i + 1
    U
b = [-1e307; 1.209; 1.408; 1.607; 1.806; 2.005; 2.204; 2.403; 2.602; 2.801; 1e307]
o = [12; 13; 9; 14; 6; 10; 13; 6; 10; 7]
# Reikia sujungti du paskutinius e narius, nes paskutinis mažesnis už 5.
b := pašalinti(b, 7)
a := pašalinti(a, 7)
# Naujai sudarytiems intervalams apskaičiuosime tikėtinus dažnius ir stebėta kriterijaus statistikos reikšmę.
o := hist(b, X)
e := 0
k := rows(o)
k = 9
j := 1 .. k
x_vid := 1/n*sum(((a[i] + a[i + 1])/2)*o[i], i = 1 .. k)
s := sqrt(1/(n - 1)*sum(((a[i] + a[i + 1])/2 - x_vid)^2*o[i], i = 1 .. k))
e[j] := (pnorm(b[j + 1], x_vid, s) - pnorm(b[j], x_vid, s))*n
b = [-1e307; 1.209; 1.408; 1.607; 1.806; 2.005; 2.403; 2.602; 2.801; 1e307]
o = [12; 13; 9; 14; 6; 23; 6; 10; 7]
e = [10.3492; 7.79437; 10.7016; 12.9976; 13.9642; 24.4286; 8.29741; 5.45842; 6.00852]
o - e = [1.65081; 5.20563; -1.70165; 1.00243; -7.96423; -1.42864; -2.29741; 4.54158; 0.99148]
(o - e)^2 = [2.72518; 27.0985; 2.89561; 1.00487; 63.429; 2.041; 5.27809; 20.6259; 0.983033]
chem((χ^2)*imt) := sum((o[j] - e[j])^2/e[j], j)
# Randame hipotezės H_0 kritinę sritį W_k ir neatmetimo sriti W_0
chem((χ^2)*.1 - α;3) := qchisq(1 - α, k - r - 1)
chem((χ^2)*.1 - α;3) = 10.6446
W_k == (6.251, ∞)
W_0 == (0, 6.251)
chem(χ^2) := 0, 0.01 .. 20
O := 0.1
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# Išvada: Hipotezė H_0 neatmetama, nes (χ^2)*imt priklauso W_0. Patikrinome empirines
# pasiskirstymo funkcijos suderinamumą su teorine hipoteze.
# Generalines aibes tankio ir pasiskirstymo funkcijos
p(x) :=
    0.2*e^(-(x - 9.265)^2/9) if 0 ≤ x
    0 otherwise
F(x) :=
    0.2*integral(e^(-(y - 9.265)^2/9), y = -∞ .. x) if 0 ≤ x
    0 otherwise
