ORIGIN := 1
# [component: outputs X]
n := rows(X) = 44
X = [
    57; 61; 57; 57; 58; 57; 61; 54; 68; 51
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]
n := length(X) = 44
x := sort(X)
x = [
    42; 43; 46; 46; 47; 47; 48; 49; 49; 50
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]
min(X) = 42
max(X) = 69
IP := x[n] - x[1] = 27
n*0.5 = 22
Md := (x[22] + x[23])/2 = 54.5
median(x) = 54.5
n*0.25 = 11
Q1 := (x[11] + x[12])/2 = 51
Q2 := (x[33] + x[34])/2 = 57.5
n*0.75 = 33
xvid := 1/n*sum(x[k], k = 1 .. n) = 54.6591
mean(x) = 54.6591
s2 := 1/n*sum((x[i] - xvid)^2, i = 1 .. n) = 38.2701
var(x) = 38.2701
1/n*sum(x[i]^2 - xvid^2, i = 1 .. n) = 38.2701
sp2 := 1/(n - 1)*sum((x[i] - xvid)^2, i = 1 .. n) = 39.1601
Var(x) = 39.1601
n*s2/(n - 1) = 39.1601
kvantilis(q, imtis) :=
    u ← sort(imtis)
    n ← length(u)
    i ← floor(n*q)
    if floor(n*q) == ceil(n*q)
        u_q ← 0 if i == 0
        u_q ← u[i] if i == n
        u_q ← (u[i] + u[i + 1])/2 otherwise
    u_q ← u[i + 1] otherwise
    u_q
kvantilis(0.5, X) = 54.5
kvantilis(0.25, X) = 51
kvantilis(0.75, X) = 57.5
kvantilis(0.01, X) = 42
kvantilis(0.02, X) = 42
kvantilis(0.1, X) = 47
KP := kvantilis(0.75, X) - kvantilis(0.25, X) = 6.5
sp := sqrt(sp2) = 6.25781
s_vid := sp/sqrt(n) = 0.9434
vk := sp/xvid = 0.114488
m_3 := 1/(n - 1)*sum((x[i] - xvid)^3, i = 1 .. n) = 60.8116
A_s := n/(n - 2)*m_3/sp^3 = 0.25997
skew(X) = 0.25997
m_4 := 1/(n - 1)*sum((x[i] - xvid)^4, i = 1 .. n) = 4121.58
E_k := 1/((n - 2)*(n - 3))*(n*(n + 1)*m_4/sp^4 - 3*(n - 1)^2) = -0.130907
kurt(X) = -0.130907
dazniu_skirstinys(imtis) :=
    u ← sort(imtis)
    i ← 1
    y[i] ← u[i]
    v[i] ← 0
    for elem ∈ u
        v[i] ← v[i] + 1 if y[i] == elem
        otherwise
            i ← i + 1
            y[i] ← elem
            v[i] ← 1
    augment(y, v)
transpose(dazniu_skirstinys(X)) = [
    42, 43, 46, 47, 48, 49, 50, 51, 52, 54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;
    1, 1, 2, 2, 1, 2, 1, 5, 2, 5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]
'
N := 1 + 3.322*log(n) = 6.45955
N := floor(N) = 6
k := 1 .. N
x[1] = 42
x[n] = 69
IP := x[n] - x[1] = 27
a[1] := floor(x[1]/10)*10 = 40
a[N + 1] := ceil(x[n]/10)*10
a[N + 1] = 70
h := (a[N + 1] - a[1])/N = 5
a[k] := a[1] + (k - 1)*h
v := hist(a, x)
a = [40; 45; 50; 55; 60; 65; 70]
v = [2; 7; 13; 12; 7; 3]
sum(v) = 44
b[k] := a[k] + h/2
xvid = 54.6591
1/n*sum(b[i]*v[i], i = 1 .. N) = 55.2273
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Δ := 1/(n*h)*v
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α := 0.05
1 - α = 0.95
qt(1 - α/2, n - 1) = 2.01669
qt(α/2, n - 1) = -2.01669
Plxvid := [xvid - sp/sqrt(n)*qt(1 - α/2, n - 1), xvid + sp/sqrt(n)*qt(1 - α/2, n - 1)] = [52.7565, 56.5616]  # pasikliautinas
qchisq(1 - α/2, n - 1) = 62.9904
qchisq(α/2, n - 1) = 26.7854
Pls2 := [sp2*(n - 1)/qchisq(1 - α/2, n - 1), sp2*(n - 1)/qchisq(α/2, n - 1)] = [26.7324, 62.8659]
a = [40; 45; 50; 55; 60; 65; 70]
a[1] := -∞
a[N + 1] := ∞
a = [-1e307; 45; 50; 55; 60; 65; 1e307]
O := v
O = [2; 7; 13; 12; 7; 3]
sum(O) = 44
F(x) := pnorm(x, xvid, sp)  # pasiskirstymo funkcija
E[k] := (F(a[k + 1]) - F(a[k]))*n
E = [2.69947; 7.34483; 12.9115; 12.3895; 6.48906; 2.1656]
sum(E) = 44  # Teoriniai / tiketini dazniai
# Imties statistika
χ2_imt := sum((O[i] - E[i])^2/E[i], i = 1 .. N) = 0.572007
α := 0.1
χ2_krit := qchisq(1 - α, N - 2 - 1) = 6.25139
Exponentinis
# [component: outputs D]
D = [
    79.919; 3.081; 0.062; 1.961; 5.845; 3.027; 6.505; 0.021; 0.013; 0.123
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]
n := rows(D) = 50
k := 7
a[1] := 0
h := 3
i := 1 .. k
a[i + 1] := a[i] + h
b[i] := a[i] + h/2
a[k + 1] := ∞
O := hist(a, D) = [24; 9; 5; 1; 1; 1; 9]
sum(O) = 50
m := mean(D) = 11.8935
λ := 1/m = 0.0840797  # vidurkis
F(x) := 1 - e^(-λ*x)
i := 1 .. k
E[i] := (F(a[i + 1]) - F(a[i]))*n
E = [11.1471; 8.66192; 6.73082; 5.23024; 4.06421; 3.15813; 11.0076]  # Teoriniai / tiketini dazniai
sum(E) = 50
# Imties statistika
χ2_imt := sum((O[i] - E[i])^2/E[i], i = 1 .. k) = 22.8508
α := 0.05
χ2_krit := qchisq(1 - α, k - 1 - 1) = 11.0705
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Kolmogorov - Smimovtest  # Ar X = N(0,1)?
α := 0.2
Z := [-1.2; 0.2; -0.6; 0.8; -1.0]
X := sort(Z) = [-1.2; -1; -0.6; 0.2; 0.8]
n := rows(X) = 5
Φ(x) := pnorm(x, 0, 1)
x := X[1] - 1, X[1] - 1 + 0.01 .. X[n] + 1
